# Grid Search: Sigma_ratio=0.95, Epsilon_ratio=1.25
units           real
atom_style      atomic
boundary        p p p

read_data       inputs/data.ga_base_2types
replicate       2 2 3

# Randomize types (50% Type 2)
set             group all type/fraction 2 0.5 12345

# Force Field
pair_style      lj/cut/kk 12.0
pair_coeff      1 1 0.4300 2.7000
pair_coeff      2 2 0.5375 2.5650
pair_coeff      1 2 0.4808 2.6325

# Settings
neighbor        2.0 bin
neigh_modify    delay 0 every 1 check yes
velocity        all create 293.0 1075 dist gaussian

thermo          1000
thermo_style    custom step temp press density

# Minimization
minimize        1.0e-4 1.0e-6 1000 10000
reset_timestep  0

# Equilibration (5000 steps)
print           "=== EQUILIBRATION ==="
timestep        2.0
fix             nvt all nvt temp 293.0 293.0 100.0
run             5000
unfix           nvt

# Reset timestep to 0 so ave/time starts clean
reset_timestep  0

# Production & RDF (10000 steps)
print           "=== PRODUCTION ==="
fix             nvt all nvt temp 293.0 293.0 100.0

# Average over the entire 10000 steps run
# Nevery=50, Nrepeat=200, Nfreq=10000 -> 50*200 = 10000 steps window
compute         myrdf all rdf 200 1 1 2 2 1 2 cutoff 12.0
fix             rdfout all ave/time 50 200 10000 c_myrdf[*] file grid_outputs/out_s95_e125.rdf mode vector

run             10000
